<?xml version="1.0" encoding="UTF-8"?>
<neuroml xmlns="http://www.neuroml.org/schema/neuroml2"
	xmlns:xsi="http://www.w3.org/2001/XMLSchema-instance"
	xsi:schemaLocation="http://www.neuroml.org/schema/neuroml2 ../Schemas/NeuroML2/NeuroML_v2beta4.xsd"
	id="rods_cones_rodbips">
	<include href="rod.cell.nml"/>
	<include href="cone.cell.nml"/>
	<include href="rod_bipolar.cell.nml"/>
	<include href="rod_bipolar.cell.nml"/>
	<include href="invertingGradedSynapse.nml"/>

	<gapJunction id="rod_rod_gap" conductance="0.5nS"/>
	<gapJunction id="cone_rod_gap" conductance="0.2nS"/>
	<!-- dummy endpoint for graded synapses -->
	<silentSynapse id="silent"/>
	<!--<invertingGradedSynapse id="invGraded" g_max="2.56nS" v_slope="10mV" v_thresh="-44mV" t_syn="10ms" e_rev="0mV"/>-->
    <gradedSynapse id="invGraded" conductance="5pS" delta="5mV" Vth="-55mV" k="0.025per_ms" erev="0mV"/>

	<pulseGenerator id="pulseGen1" delay="50ms" duration="200ms" amplitude="0.0032nA"/>

	<network id="rods_cones_rodbips">
		<population type="populationList" id="rods_pop" component="rod" size="1500">
			<instance id="0">
				<location x="0.0" y="0.0" z="0"/>
			</instance>
			<instance id="1">
				<location x="0.0" y="23.0" z="0"/>
			</instance>
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		</population>

		<population type="populationList" id="cones_pop" component="cone" size="16">
			<instance id="0">
				<location x="0.0" y="0.0" z="40"/>
			</instance>
			<instance id="1">
				<location x="0.0" y="29.0" z="40"/>
			</instance>
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		</population>

		<population type="populationList" id="rod_bipolars_pop" component="rod_bipolar" size="100">
			<instance id="0">
				<location x="0.0" y="0.0" z="40"/>
			</instance>
			<instance id="1">
				<location x="0.0" y="24.0" z="40"/>
			</instance>
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		</population>

		<electricalProjection id ="rod_rod_gaps" presynapticPopulation="rods_pop" postsynapticPopulation="rods_pop">
			<electricalConnectionInstance id="0" preCell="../rods/1/rod" postCell="../rods/2/rod" synapse="rod_rod_gap"/>
			<electricalConnectionInstance id="1" preCell="../rods/4/rod" postCell="../rods/5/rod" synapse="rod_rod_gap"/>
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		</electricalProjection>

		<electricalProjection id ="cones_rods_gap" presynapticPopulation="cones_pop" postsynapticPopulation="rods_pop">
			<electricalConnectionInstance id="0" preCell="../cones/2/cone" postCell="../rods/1427/rod" synapse="cone_rod_gap"/>
			<electricalConnectionInstance id="1" preCell="../cones/3/cone" postCell="../rods/171/rod" synapse="cone_rod_gap"/>
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		</electricalProjection>

		<continuousProjection id ="rods_rod_bipolars_graded" presynapticPopulation="rods" postsynapticPopulation="rod_bipolars_pop">
			<continuousConnectionInstance id="0" preCell="../rods/0/rod" postCell="../rod_bipolars_pop/15/rod_bipolar" preComponent="silent" postComponent="invGraded"/>
			<continuousConnectionInstance id="1" preCell="../rods/0/rod" postCell="../rod_bipolars_pop/46/rod_bipolar" preComponent="silent" postComponent="invGraded"/>
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		</continuousProjection>

		<inputList id="bright_current" component="pulseGen1" population="rods">
			<input id="0" target="../rods/0/rod" destination="synapses"/>
		</inputList>
	</network>
</neuroml>
