<?xml version="1.0" encoding="UTF-8"?>
<neuroml xmlns="http://www.neuroml.org/schema/neuroml2"
	xmlns:xsi="http://www.w3.org/2001/XMLSchema-instance"
	xsi:schemaLocation="http://www.neuroml.org/schema/neuroml2 ../Schemas/NeuroML2/NeuroML_v2beta4.xsd"
	id="rods_small">
	<include href="rod.cell.nml"/>

	<gapJunction id="rod_rod_gap" conductance="0.5nS"/>
	<pulseGenerator id="pulseGen1" delay="50ms" duration="200ms" amplitude="0.0032nA"/>

	<network id="rods_small">
		<population type="populationList" id="rods_pop" component="rod" size="60">
			<instance id="0">
				<location x="0.0" y="0.0" z="0"/>
			</instance>
			<instance id="1">
				<location x="0.0" y="26.0" z="0"/>
			</instance>
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		</population>
		<electricalProjection id ="rod_rod_gap" presynapticPopulation="rods_pop" postsynapticPopulation="rods_pop">
			<electricalConnectionInstance id="0" preCell="../rods_pop/1/rod" postCell="../rods_pop/2/rod" synapse="rod_rod_gap"/>
			<electricalConnectionInstance id="1" preCell="../rods_pop/4/rod" postCell="../rods_pop/5/rod" synapse="rod_rod_gap"/>
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		</electricalProjection>

		<inputList id="bright_current" component="pulseGen1" population="rods_pop">
			<input id="0" target="../rods_pop/0/rod" destination="synapses"/>
		</inputList>
	</network>
</neuroml>
